object transformer {
	name xfrm_${LOADID}${PHASE};
	phases ${PHASE}S;
	from main_node_${PHASE};
	to node_${LOADID}${PHASE};
	configuration xfmr_config_${PHASE};
}
object triplex_node {
	name node_${LOADID}${PHASE};
	phases ${PHASE}S;
	nominal_voltage 120;
}

object triplex_meter:..${COUNT} {
	name `meter_{SEQ_CUSTID:INC}`;
	parent node_${LOADID}${PHASE};
	phases ${PHASE}S;
	nominal_voltage 120;
	object house {
		name `house_{SEQ_CUSTID}`;
		floor_area random.triangle(1000,1500);
		cooling_setpoint 76 degF;
		heating_setpoint 65 degF;
		hvac_power_factor 0.75;
#if GAS==yes
#if GAS_COOL==no
		cooling_system_type NONE;
#else
		cooling_system_type HEAT_PUMP;
		gas_enduses "WATERHEATER|RANGE|DRYER";
#endif //GAS_COOL
		heating_system_type GAS;
		thermal_integrity_level ABOVE_NORMAL;
#endif //GAS yes
#if GAS==no
#if UPGRADE==yes
		cooling_system_type HEAT_PUMP;
		heating_system_type HEAT_PUMP;
		thermal_integrity_level VERY_GOOD;
#endif //UPGRADE
#endif // GAS no
	};
}
